New Transformer.TrafoTri phases=3 windings=2 xhl=0.00000001 %loadloss=0.00000001 %noloadloss=0.00000001
~ wdg=1 bus=SourceBus kV=13.8 kva=10000 conn=delta
~ wdg=2 bus=A.1.2.3.4 kV=0.22 kva=10000 conn=wye

New reactor.R phases=1 bus1=A.4 bus2=A.0 r=15 x=0
