//-------------------------------------------------------------------------------------------------------------------------------------------------------------------------------------------------------//
// Sistema Teste - TS ANEEL (LADEE / EPRI)
//-------------------------------------------------------------------------------------------------------------------------------------------------------------------------------------------------------//

// Limpar memória do OpenDSS
Clear

Redirect Alimentador.dss

Redirect Condutores.dss

Redirect GeometriaDeRede.dss

Redirect ChavesSeccionadoras.dss

Redirect SegmentosMT_i.dss

Redirect Transformador.dss

Redirect SegmentosBT_i.dss

Redirect Medidores.dss

Redirect RamaisBT_i.dss

Redirect CargasBT.dss

Redirect CargasMT_Estrela.dss

Set voltagebases=[13.8 0.22]
Calcvoltagebases
