// Condutor 4 AWG
New Wiredata.4AWG
~ GMR=0.00213 DIAM=0.588 RAC=1.551 normamps=140
~ GMRunits=m RADunits=cm Runits=km

// Estrutura da rede - S1 - 4 AWG
New Linegeometry.S1_4AWG nconds=4 nphases=3 reduce=No
~ cond=1 wire=4AWG X=0.2 h=7.0 units=m
~ cond=2 wire=4AWG X=0.2 h=6.8 units=m
~ cond=3 wire=4AWG X=0.2 h=6.6 units=m
~ cond=4 wire=4AWG X=0.2 h=7.2 units=m
