//-------------------------------------------------------------------------------------------------------------------------------------------------------------------------------------------------------//
// Sistema Teste - TS ANEEL (LADEE / EPRI)
//-------------------------------------------------------------------------------------------------------------------------------------------------------------------------------------------------------//

// Limpar memória do OpenDSS
Clear


//-------------------------------------------------------------------------------------------------------------------------------------------------------------------------------------------------------//
// Equivalente de Thevenin do Alimentador
//-------------------------------------------------------------------------------------------------------------------------------------------------------------------------------------------------------//

New Circuit.Alimentador phases=3 basekv=13.8 pu=1.045 bus1=barra1A r1=0 x1=0.0001
