//-------------------------------------------------------------------------------------------------------------------------------------------------------------------------------------------------------//
// Medidores
//-------------------------------------------------------------------------------------------------------------------------------------------------------------------------------------------------------//

New EnergyMeter.Line.CMT element=Line.CMT terminal=1
